# AguaClara Water Treatment Plants
# Automated Design
# User Inputs:
# Design References
# [reference: UserInputs-sestest.xmcd]
# [reference: DesignAssumptions-sestest.xmcd]
# [reference: MathFunctions.xmcd]
# [reference: PipeDatabase.xmcd]
# [reference: MinorLossCoefficients.xmcd]
# [reference: FluidsFunctions.xmcd]
# [reference: Channel.xmcd]
W_Channel = 0.244687 m
L_Channel = 3.45 m
ND_SedPipeEntrance = 6 in
# [reference: Sedimentation.xmcd]
H_SedBelowSlope = 0.5 m
H_SedBelowStraight = 0 m
H_SedAbove = 0.12 m
H_SedPlate = 0.38 m
HW_Sed = 1 m
H_Sed = 1.1 m
Z_Mp = 0.4 m
L_Sed = 2.80945 m
L_SedPlate = 0.438786 m  # Length of tank occupied by plate settlers (not including angled section)
N_SedPlates = 51
V_SedC = 9.798 m/day
V_SedUp = 46.13 m/day
# [reference: FCM.xmcd]
N_Fcm = 1
ID_FcmTube = 0.0625 in
ID_FcmTube = 1.5875 mm
L_FcmTube = 26.1415 cm
Q_FcmTubeMax = 67.5 mL/min
HL_FcmValve = 0.8465 cm
# [reference: Flocculation.xmcd]
W_FlocChannel = 0.5 m
S_FlocBaffle = [0.0292787; 0.0414064; 0.0865425] m
B_FlocBaffle = [0.0492787; 0.0614064; 0.106543] m
N_FlocBafflesMin = 75
HL_Floc = 6.4815 cm
X_FlocBaffles = [
    0.1143, 2.70791;
    0.163579, 2.6465;
    0.212857, 2.5851;
    0.262136, 2.47855;
    0.311415, 2.37201;
    0.360694, 2.26547;
    0.409972, 2.15893;
    0.459251, 2.05238;
    0.50853, 1.94584;
    0.557809, 1.8393
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] m
HW_FlocStart = 1.06481 m
W_FlocPort = 0.0865425 m
L_FlocBaffles = [
    0.956082, 0.93789;
    1.1209, 1.10271;
    0.956082, 0.93789;
    1.1209, 1.035;
    0.956082, 0.870186;
    1.1209, 1.035;
    0.956082, 0.870186;
    1.1209, 1.035;
    0.956082, 0.870186;
    1.1209, 1.035
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] m
H_FlocPort = 0.75 m
N_FlocBaffles = 72
Z_FlocBaffles = [
    0, 0;
    0.0439181, 0.0621096;
    0, 0;
    0.0439181, 0.129814;
    0, 0;
    0.0439181, 0.129814;
    0, 0;
    0.0439181, 0.129814;
    0, 0;
    0.0439181, 0.129814
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] m
Gt_FlocMinFlow = 4829.91
# [reference: EntranceTank.xmcd]
ND_Lfom = 3 in
HL_Rm = 3.84686 cm
N_Lfom = 1
D_LfomOrifices = 9 mm
N_LfomOrifices = [5; 4; 3; 2; 2; 2; 2; 1; 1; 1]
Q_LfomErrorMax = 1.33723 %
L_Et = 0.55245 m
W_Et = 0.6 m
HW_Et = 1.07923 m
H_Et = 1.17923 m
# [reference: Launder.xmcd]
N_SedLaunderOrifices = 8
Q_SedLaunderOrifices = 11.25 L/min
Z_SedLaunder = 0.94 m
ND_SedLaunder = 3 in
D_SedLaunderOrifice = 18 mm
# [reference: PlantLevelTank.xmcd]
HW_Plt = 0.5 m
ND_PltWeir = 0.0762 m
H_PltWeir = 0.477039 m
H_Plt = 0.7 m
W_Plt = 0.2262 m
# [reference: SludgeDrain.xmcd]
N_SedSludgeOrifices = 28
ND_SedSludge = 2 in
Q_SludgeDrainInitial = 187.297 L/min
D_SedSludgeOrifice = 5 mm
# Any additional needed elevations should be calculated in the files above.
# AutoCAD References
L_ChannelInlet := .5*W_Sed
W_ChannelInlet := .65*W_Channel
sedlayout := 3
H_Channel := .3 m
W_EChannel := W_Channel
L_Floc := L_Sed*N_FlocChannels
H_EChannel := H_Channel
T_EChannelWall := T_ChannelWall
H_Floc := H_Sed
baffle_amp := .5 in
baffle_thick := 4 mm
baffle_slope := 90 deg
baffle_width := W_FlocChannel
baffle_col := 1  # this is a constant!
baffle_periods := 8.5
baffle_y := 7 cm
baffle_num := 1
baffle_x := 4 in
# [reference: basics.xmcd]
# [reference: pipe.xmcd]
# [reference: tank.xmcd]
# [reference: lamina.xmcd]
# [reference: cross.xmcd]
# [reference: Tee.xmcd]
# [reference: elbow.xmcd]
# [reference: Sludge.xmcd]
# [reference: Channel.xmcd]
# [reference: Manifold.xmcd]
# [reference: SedTankslopes.xmcd]
# [reference: SedTank.xmcd]
# [component: inputs SedTank]
# [reference: floctank.xmcd]
# [component: inputs FlocTank]
# [reference: EntranceTank.xmcd]
# [reference: chemicalstock.xmcd]
# [reference: platform.xmcd]
# [reference: PlantLevelTank.xmcd]
