# AguaClara Design Tool
# [reference: BasicClientInputs.xmcd]
# [reference: ExpertClientInputs.xmcd]
# [reference: DesignAssumptions.xmcd]
# [reference: MathFunctions.xmcd]
# [reference: PipeDatabase.xmcd]
# [reference: MinorLossCoefficients.xmcd]
# [reference: FluidsFunctions.xmcd]
# [reference: Sedimentation Tank.xmcd]
# [reference: Floc Hopper.xmcd]
# [reference: FCM.xmcd]
# [reference: Flocculation Energy Dissapation.xmcd]
# [reference: RapidMixer.xmcd]
# [reference: Materials List.xmcd]
# [reference: EntranceTankDim.xmcd]
# [reference: AutoCADMasterProgram.xmcd]
# This file must have at least one variable displayed otherwise it doesn't recalculate and it claims that all variables are undefined.
H_SedFrameWall = 0.07 m
EN_DrillSeries = 0
EN_PipeSpec = 8
L_Sed = 1.85143 m
EN_FcmTube = 0
AC_SedTank = [
    "_-view o t"; "-layer m tank"; "c t 132,132,132"; "tank"; "  "; "_-view o t _zoom w 0.16,-0.16,0 -2.01143,1.16,1.81639 _box 0,0,0 -1.85143,1,1.81639 _box 0.15,-0.15,-0.15 -2.00143,1.15,1.81639 _subtract 0.15,-0.15,-0.15  0,0,0 "; "-layer s 0"; "  "; "-layer f tank"; "  "
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]
AC_FlocTank = [
    "-layer m floctank"; "c t 91,91,91"; "floctank"; "  "; "_-view o t _zoom w 0.16,2.14,0 -2.01143,4.71,2.04574 _box 0,2.3,0 -1.85143,4.55,2.04574 _box 0.15,2.15,-0.15 -2.00143,4.7,2.04574 _subtract 0.15,2.15,-0.15  0,2.3,0 "; "-layer s 0"; "  "; "-layer f floctank"; "  "; "-layer m floctankwall"
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]
AC_EntranceTank = [
    "-layer m entrancetank";
    "c t 214,214,214";
    "entrancetank";
    "  ";
    "_-view o t _zoom w 0.16,4.54,0 -0.66912,5.36912,2.34574 _box 0,4.7,0 -0.50912,5.20912,2.34574 _box 0.15,4.55,-0.15 -0.65912,5.35912,2.34574 _subtract 0.15,4.55,-0.15  0,4.7,0 ";
    "-layer s 0";
    "  ";
    "-layer f entrancetank";
    "  ";
    "-layer s entrancetank";
    "  ";
    "_box -0.50912,4.55,2.29574 -0.46674,4.7,2.34574";
    "-layer s 0";
    "  ";
    "-layer t entrancetank";
    "  ";
    "_-view o t";
    "_subtract 0.15,4.7,0  -0.50912,4.55,2.29574 ";
    "-layer f entrancetank";
    "  "
]
