# AguaClara Water Treatment Plants
# Automated Design
# References
# Here we will reference the subprograms: Unit Processes, Hydraulic Design, AutoCAD?, and Report Generator?. In order to be able to transfer data from one subprogram to another we will need to be able to send and recieve everything through function calls.
# [reference: HydraulicDesign.xmcd]
# [reference: UnitProcesses.xmcd]
# User Inputs:
# Choose either a Pipe Schedule Number or an SDR rating:
# [component: outputs PipeSpecification]
# Engineer Entered Values:
Q_plant := 740*L/min
# Values used to Draw Plant:
tank_thick := 20 cm
# floc tank parameters
lvltank_thick := 20 cm
stockplat_thick := lvltank_thick
grit_thick := lvltank_thick
FlocTank_width := .8 m
platform_thick := .5 m
β := 45 deg
# sed tank parameters
channel_thick := 10 cm
SedTank_width := 100 cm  # Width of the lamella
walkway_width := 1 m
L_lamella := 80 cm  # length of the lamella
lamella_spacing := 5 cm  # lamella spacing
# grit chamber parameters
# Do you have metric of English drill bits?
# [component: outputs DrillSize]
# Calls Functions Here:
# Sedimentation Tank Design
# This file returns:
# 1st column: length of the sedimentation tank, width of the sedimentation tank, height of the sedimentation tank + freeboard.
# 2nd column: Number of lamella
SedTank := SedTankDesign(Q_plant, SedTank_width, lamella_spacing, L_lamella, β) = [[3.952; 1; 2.04282], 61.5224]
# Flocculator Design
# Flocculation File returns:
# 1st column: Floc tank dimensions: Height, Width, Length
# 2nd Column: baffle spacing in each section
# 3rd column:Floc inlet
# 4th column: Number of baffles in each section
Flocculator := flocculator(Q_plant, SedTank_width, L_lamella, β, lamella_spacing) = [[7.904; 0.5; 2.07561], [0.142165; 0.297137; 0.420215], 1.5, [3; 9; 18], 0.0327878]
# Chemical Feed Design
FeedDesign := ChemicalFeed(Q_plant) = 370 mL/min
# Launderer Design
[SedPipe_length/m, D_orifice/m, orifice_dist/m, manifold_depth/m, D_launder/m, n_orifices]
Laund := Launder(Q_plant, PipeSpecification, SedTank[:, 0][0][0]*m, L_lamella) = [3.952, 0.00675415, 0.4, 0.1, 0.108204, 2]
# Sludge Pipe Design
SludgePipe := Sludge(Q_plant, PipeSpecification, SedTank[:, 0][0][0]*m) = ƒ(Length) → [[Length]]  # error: Cannot understand this syntax.
# Plant Leveling Tank
PLT := PlantLevelingTank(Q_plant, PipeSpecification) = [3, 3, [2; 2; 2], 5, 0.2]
# Channel Design
Channel_dim := Channel(Q_plant, SedTank_width, tank_thick) = ƒ(Length, Unitless) → [Length]  # error: Cannot understand this syntax.
# Grit Chamber Design
Grit := gritchamber(Q_plant, DrillSize, r_drum, PipeSpecification)  # error: This value has units: Unitless, but must have units: Length.
# Plant Elevation Design
# Constructing Table:
headerrow := ["Parameter"; "Value"; "Units"]
Units := [" "; " meter"; "meter"]
headercolumn := ["Number of Sedimentation Tanks"; "Lamella Spacing in Sedimentation Tank"; "Number of Lamella in Sedimenation Tank"]
Z := [n_sedtanks; lamella_spacing/m; SedTank[:, 1][0]]
length(headercolumn) = 3
length(Z) = 3
table(headerrow, headercolumn, Z) :=
    for i ∈ 0 .. length(headercolumn)
        for j ∈ 0 .. last(headerrow)
            table[i, j] ← headerrow[j] if i == 0
            otherwise
                table[i, j] ← headercolumn[i - 1] if j == 0
                table[i, j] ← Z[i - 1] if j == 1
                table[i, j] ← Units[i - 1] if j == 2
    return table
headercolumn_Dim := [" Sedimentation Tank"; "Dimensions of Flocculator"; "Dimensions of Grit Chamber"; "Dimensions of Leveling Tank"; "Dimensions of Channel"]
headerrow_Dim := ["Component"; "Length"; "Width"; "Height"; "Units"]
Dim_y := [SedTank[:, 0][0][1]; Flocculator[:, 0][0][1]; Grit[:, 0][0][1]; PLT[:, 2][0][1]; Channel_dim[1]/m]  # error: This variable is undefined.
Dim_z := [SedTank[:, 0][0][2]; Flocculator[:, 0][0][1]; Grit[:, 0][0][2]; PLT[:, 2][0][2]; Channel_dim[2]/m]  # error: This variable is undefined.
Dim_x := [SedTank[:, 0][0][0]; Flocculator[:, 0][0][0]; Grit[:, 0][0][0]; PLT[:, 2][0][0]; Channel_dim[0]/m]  # error: This variable is undefined.
Units2 := ["meter"; "meter"; "meter"; "meter"; "meter"]
tableDim(headerrow_Dim, headercolumn_Dim, Dim_x, Dim_y, Dim_z, Units2) :=
    for i ∈ 0 .. length(headercolumn_Dim)
        for j ∈ 0 .. last(headerrow_Dim)
            tableDim[i, j] ← headerrow_Dim[j] if i == 0
            otherwise
                tableDim[i, j] ← headercolumn_Dim[i - 1] if j == 0
                tableDim[i, j] ← Dim_x[i - 1] if j == 1
                tableDim[i, j] ← Dim_y[i - 1] if j == 2
                tableDim[i, j] ← Dim_z[i - 1] if j == 3
                tableDim[i, j] ← Units2[i - 1] if j == 4
    return tableDim
# Construct Plant Elevation Tables
headerrow_elevation := ["Element"; "Elevation from bottom of the sed tank (m)"; "Elevation from platform (m)"]
# top of alum stock tank
# port on alum stock tank
# bottom of alum stock tank
# alum platform height
# valve level in the FCM
# water level in the FCM
# end of the FCM tube at maximum alum dose
# grit chamber wall
# grit chamber maximum water level
# orifice elevation in the grit chamber
# horizontal pipe centerline where it leaves the grit chamber
# water level in rapid mix
# wall height for beginning of flocculator
# water level at beginning of flocculator
# wall height for the sedimentation tank
# water level in the sedimentation tank and channel
# top of the effluent launder
# top of the plate settlers
# bottom of the plate settlers
# platform height
# weir height
# level control water height
headercolumn_elevation := [
    "top of alum stock tank";
    "port on alum stock tank";
    "bottom of alum stock tank";
    "alum platform height";
    "valve level in the FCM";
    "water level in the FCM";
    "end of the FCM tube at maximum alum dose";
    "grit chamber wall";
    "grit chamber maximum water level";
    "orifice elevation in the grit chamber";
    "horizontal pipe centerline where it leaves the grit chamber";
    "water level in rapid mix";
    "wall height for beginning of flocculator";
    "water level at beginning of flocculator";
    "wall height for the sedimentation tank";
    "water level in the sedimentation tank and channel";
    "centerline of the effluent launder";
    "top of the plate settlers";
    "bottom of the plate settlers";
    "platform height";
    "weir height";
    "level control water height";
    "level control wall height"
]
Z_elevation := [
    Z_topAldrum;
    Z_Aldrumport;
    Z_botAldrum;
    Z_chemplatform;
    Z_FCMvalve;
    Z_FCMhighestport;
    Z_FCMlowestport;
    ZT_GC;
    ZW_GC;
    Z_GCorf;
    Z_rmhorizontalpipecenterline;
    ZW_rm;
    ZT_floc_max;
    ZW_floc_max;
    ZT_sed;
    ZW_sed;
    Z_launderCL;
    Z_platetops;
    Z_platebottoms;
    Z_platform;
    Z_weir;
    ZW_level;
    ZT_level
]  # error: This variable is undefined.
tableElevation(headerrow_elevation, headercolumn_elevation, Z_elevation) :=
    for i ∈ 0 .. length(headercolumn_elevation)
        for j ∈ 0 .. last(headerrow_elevation)
            table[i, j] ← headerrow_elevation[j] if i == 0
            otherwise
                table[i, j] ← headercolumn_elevation[i - 1] if j == 0
                table[i, j] ← Z_elevation[i - 1] if j == 1
                table[i, j] ← Z_elevation[i - 1] - Z_elevation[22] if j == 2
    return tableElevation  # error: This function refers to itself inconsistently.
# Table of Parameters:
# top
# [component: inputs table(headerrow, headercolumn, Z)]
# [component: inputs tableDim(headerrow_Dim, headercolumn_Dim, Dim_x, Dim_y, Dim_z, Units2)]
# [component: inputs tableelevation(headerrow_elevation, headercolumn_elevation, Z_elevation)]
